fstart := 500
res := 2^8 = 256
fslut := 3000
a := 97
e := 101
s := 115
y := 121
deltaF := fslut - fstart
f(x) := x*deltaF/res + fstart
f(256) = 3000
(6521 - fstart)/(deltaF/res) = 616.55
f(a) = 1447.27
f(s) = 1623.05
f(y) = 1681.64
