z0 := 1*e^(1j*0.103)
p0 := 0.90*e^(1j*0.103)
z1 := 1*e^(-1j*0.103)
p1 := 0.9*e^(-1j*0.103)
H(z) := (z - z0)*(z - z1)/((z - p0)*(z - p1)) expand; float, 3 → (-1.99*z + z^2 + 1.0)/(-1.79*z + z^2 + 0.81)
y(n) == x(n) - 1.99*x(n - 1) + x(n - 2) + 1.79*y(n - 1) - 0.81*y(n - 2)
-1*2^8 = -256
1*2^8 = 256
-1.99*2^8 = -509.44
3/8 = 0.375
-x*2^8 == -96 solve, x → 3/8
1/(48 kHz) = 20.8333 μs
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y(n) == x(n) - 1.99*x(n - 1) + x(n - 2) + 1.79*y(n - 1) - 0.81*y(n - 2)
